# 1 задание
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x := 2
n := floor(rnd(10) + 1)
n = 1
y := (sqrt(x^3 + n) + cos(|n*x - 1|)^2)/(nthroot(x^5 + sin(x) + n, 4)*cos(π/4*(x + n)))
y = -1.92924
# 2 задание
x := 7
y := 10
z := -3
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p := if(x > y, x > y*sin(x) + 3*|y| - z^2, (y + 3)/sqrt(z^2 + 1)*ln(|x + 1|))
p = 8.5485
q := if((x > y) and (x < 1), cos(x) + 2*|y + 1| - z, (x*y + 3)/sqrt(y^2 + 5))
q = 7.12407
w := if((x < y) or (y ≥ 10), x^2 + 2*(y*x + 1) - z, (x^-3*y^2 + 3)*sqrt(z^2 + 7))
w = 194
# 3 задание
x1 := -2
x2 := 2
Δx := 0.4
x := x1, x1 + Δx .. x2
n := floor(rnd(10) + 1)
n = 2
f(x) := (x^2 - n*x + sin(x))*sqrt(|x - cos(n*x)|)
f(x) = [8.22753; 3.69265; 1.97785; 1.33681; 0.597535; 0; -0.136494; -0.220952; -0.0389189; 0.579605; 1.48125]
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# 4 задание
n := floor(rnd(10) + 1)
n = 6
a := -3*n
b := 3*n
A := runif(3, a, b)
B := runif(3, a, b)
C := runif(3, a, b)
A = [-5.38891; 11.6222; -11.7314]
B = [7.57783; -7.0565; -14.7092]
C = [-12.6967; 17.5863; -13.7131]
s := A*B = 49.7108
s := A[0]*B[0] + A[1]*B[1] + A[2]*B[2] = 49.7108
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V := B×C = [355.447; 290.674; 43.6717]
V := [B[1]*C[2] - B[2]*C[1]; B[2]*C[0] - B[0]*C[2]; B[0]*C[1] - B[1]*C[0]] = [355.447; 290.674; 43.6717]
w := (A×B)*C = 950.463
w := (A[1]*B[2] - A[2]*B[1])*C[0] + (A[2]*B[0] - A[0]*B[2])*C[1] + (A[0]*B[1] - A[1]*B[0])*C[2] = 950.463
p := if((|A| > |B|) and (|A| > |C|), "Это А", if(|B| > |A| and |B| > |C|, "Это Б", if(|C| > |B| and |C| > |A|, "Это С", "NULL")))
p = "Это С"
n := 10
m := 10
i := 0 .. n - 1
j := 0 .. m - 1
M[i, j] := floor(-10 + rnd(20))
M = [
    -10, 0, 2, -7, -1, -9, 5, 0, 7, 9;
    0, -1, 7, 5, 9, 2, -5, 6, -3, 3;
    -10, -5, 1, 6, -1, 4, -1, 4, 1, 4;
    1, -7, -2, 0, 5, -7, -1, 3, -8, -8;
    3, -2, 9, -7, 6, -7, 6, -7, 4, -5;
    3, 4, -8, 6, 0, -2, 8, 0, -1, 6;
    -1, 9, 4, -7, 6, 0, -10, 1, 0, 6;
    3, 6, -8, -4, -5, -8, 6, 2, -5, -10;
    6, -6, 1, -8, 5, 0, -2, 3, -2, 1;
    2, 0, 3, -7, -7, -1, -9, -9, 8, 7
]
Mv[i] := sum(M[:, i])
sM := sum(Mv)
sM = -16
Mp[i, j] := M[i, j]*(M[i, j] > 0)
Mpv[i] := sum(Mp[:, i])
sMp := sum(Mpv)
sMp = 218
Mn[i, j] := M[i, j]*(M[i, j] < 0)
Mnv[i] := sum(Mn[:, i])
sMn := sum(Mnv)
sMn = -234
X := submatrix(M, 0, 9, 0, 0)
Y := submatrix(M, 9, 9, 0, 9)
Y = [2, 0, 3, -7, -7, -1, -9, -9, 8, 7]
X = [-10; 0; -10; 1; 3; 3; -1; 3; 6; 2]
q := X*transpose(Y)
q = -37
# 5 задание
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# 5 задание
y(x) := e^(-(|x|/3))*cos(x)
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# 6 задание
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f(x) := if(x < 0, e^x*x^3, e^(-x)*x^3)
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# 7 задание
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g(x) := sqrt(|x|)*sin(x)
x1 := -2*π
x2 := 2*π
Δx := π/4
x := x1, x1 + Δx .. x2
X := x = [-6.28319; -5.49779; -4.71239; -3.92699; -3.14159; -2.35619; -1.5708; -0.785398; 0; 0.785398; 1.5708; 2.35619; 3.14159; 3.92699; 4.71239; 5.49779; 6.28319]
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Y := g(X)
WRITEPRN("X.txt") := X
WRITEPRN("Y.txt") := Y
XX := READPRN("X.txt")
YY := READPRN("Y.txt")
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# 8 задание
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q(x) := e^(-x^2)
x1 := -3
x2 := 3
Δx := 0.1
x := x1, x1 + Δx .. x2
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# 9 задание
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f(x, y) := sin(sqrt(x^2 + y^2))/sqrt(x^2 + y^2)
# [component: inputs f]
# 10 задание
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f(x) := x^2 + (x - 2)*sin(x) - 5
x1 := -5
x2 := 5
Δx := 0.1
x := x1, x1 + Δx .. x2
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x := -1
x1 := root(f(x), x)
x1 = -1.32936
x := 2
x2 := root(f(x), x)
x2 = 2.19967
f(x1) = 9.76996e-15
f(x2) = 3.52607e-13
y1 := x1^2 + (x1 - 2)*sin(x1) - 5 = 9.76996e-15
y2 := x2^2 + (x2 - 2)*sin(x2) - 5 = 3.52607e-13
# 11 задание
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f(x) := x^2 + x*sin(2*x) - (x - 5)*cos(x)
x1 := -4
x2 := 4
Δx := 0.1
x := x1, x1 + Δx .. x2
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x1 := root(f(x), x, -3, -2)
x1 = -2.97354
x2 := root(f(x), x, -2, -1)
x2 = -1.93283
f(x1) = -1.77636e-15
f(x2) = 0
y1 := x1^2 + x1*sin(2*x1) - (x1 - 5)*cos(x1) = -1.77636e-15
y2 := x2^2 + x2*sin(2*x2) - (x2 - 5)*cos(x2) = 0
# 12 задание
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n := floor(rnd(10) + 1)
n = 3
f(x) := x^3 + (4 - n)*x^2 + (3 - 4*n)*x - 3*n
V := transpose([-3*n, 3 - 4*n, 4 - n, 1])
X := polyroots(V)
transpose(X) = [-3, -1, 3]
# 13 задание
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n := floor(rnd(10) + 1)
n = 5
A := [n, n + 1, n + 2; n - 3, n - 2, n; n - 1, n, n + 1] = [5, 6, 7; 2, 3, 5; 4, 5, 6]
B := [6*n + 8; 6*n - 7; 6*n + 2] = [38; 23; 32]
[x; y; z] := A^-1*B
X := [x; y; z] = [1; 2; 3]
A*X = [38; 23; 32]
X := lsolve(A, B) = [1; 2; 3]
Given
n*x + (n + 1)*y + (n + 2)*z == 6*n + 8
(n - 3)*x + (n - 2)*y + n*z == 6*n - 7
(n - 1)*x + n*y + (n + 1)*z == 6*n + 2
A := Find(x, y, z) = [1; 2; 3]
x := A[0]
y := A[1]
z := A[2]
n*x + (n + 1)*y + (n + 2)*z = 38
6*n + 8 = 38
(n - 3)*x + (n - 2)*y + n*z = 23
6*n - 7 = 23
(n - 1)*x + n*y + (n + 1)*z = 32
6*n + 2 = 32
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# 14 задание
x := 4
y := 4
Given
x^2/81 + y^2/16 == 1
y1(x) := sqrt(1 - x^2/81)*4
y3(x) := 2 + sqrt(25 - (x - 9)^2)
(x - 9)^2 + (y - 2)^2 == 25
A := Find(x, y) = [4.23934; 3.52845]
y2(x) := sqrt(1 - x^2/81)*(-4)
y4(x) := 2 - sqrt(25 - (x - 9)^2)
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x := 7
y := -3
Given
x^2/81 + y^2/16 == 1
(x - 9)^2 + (y - 2)^2 == 25
A := Find(x, y) = [6.9308; -2.55175]
# 15 задание
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f(x) := x*sin(x)
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x := 2
x := Maximize(f, x)
x = 2.02876
f(x) = 1.81971
x := 5
x := Minimize(f, x)
x = 4.91318
f(x) = -4.81447
x := 8
x := Maximize(f, x)
x = 7.97867
f(x) = 7.91673
